N := 8
n := 52
α := 0.003*(n - 50)
α → 0.006
y(x) := (N + 5.2 + (-1)^N*α)*x^3 - (2*N^2 + 10.4*N + (-1)^(N - 1)*α)*x^2 - N^2*(N + 5.2)*(x - 2*N) + (-1)^N*α
y(x) → -844.8*x + (-211.194*x^2) + 13.206*x^3 + 13516.806
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y_1(x) := d/dx(y(x)) → -422.388*x + 39.618*x^2 - 844.8
x1 := -7.99947096174
-844.8*x + (-211.194*x^2) + 13.206*x^3 + 13516.806 solve, x → [8.00205078376; 15.989696416; -7.99947096174] = [8.00205; 15.9897; -7.99947]*0  # error: The unit placeholder may only contain real, non-zero scalar values, or a function of one variable with a defined inverse.
x2 := 8.00205078376
x3 := 15.989696416
# Метод касательных
x0 := -6
x_1 := x0 - y(x0)/y_1(x0)
x_1 → -8.60934226337
x1 - x_1 → 0.609871301635
x_2 := x_1 - y(x_1)/y_1(x_1)
x_2 → -8.03480853343
x1 - x_2 → 0.0353375716905
x_3 := x_2 - y(x_2)/y_1(x_2)
x_3 → -7.99960033142
x1 - x_3 → 0.000129369684204
x_4 := x_3 - y(x_3)/y_1(x_3)
x_4 → -7.99947096348
# Метод секущих
x_0 := 12
b := 20
x_1 := x_0 - (b - x_0)*y(x_0)/(y(b) - y(x_0))
x_1 → 13.5316372029
x3 - x_1 → 2.45805921316
x_2 := x_1 - (b - x_1)*y(x_1)/(y(b) - y(x_1))
x_2 → 14.6859923702
x3 - x_2 → 1.30370404582
x_3 := x_2 - (b - x_2)*y(x_2)/(y(b) - y(x_2))
x_3 → 15.3659555727
x3 - x_3 → 0.623740843391
x_4 := x_3 - (b - x_3)*y(x_3)/(y(b) - y(x_3))
x_4 → 15.707875401
x3 - x_4 → 0.281821014999
x_5 := x_4 - (b - x_4)*y(x_4)/(y(b) - y(x_4))
x_5 → 15.8658641248
x3 - x_5 → 0.123832291259
x_6 := x_5 - (b - x_5)*y(x_5)/(y(b) - y(x_5))
x_6 → 15.9359704818
x3 - x_6 → 0.0537259342786
x_7 := x_6 - (b - x_6)*y(x_6)/(y(b) - y(x_6))
x_7 → 15.9665168352
x3 - x_7 → 0.0231795808835
x_8 := x_7 - (b - x_7)*y(x_7)/(y(b) - y(x_7))
x_8 → 15.9797200527
x3 - x_8 → 0.00997636334931
x_9 := x_8 - (b - x_8)*y(x_8)/(y(b) - y(x_8))
x_9 → 15.9854071443
x3 - x_9 → 0.00428927172462
x_10 := x_9 - (b - x_9)*y(x_9)/(y(b) - y(x_9))
x_10 → 15.9878531042
x3 - x_10 → 0.001843311891
x_11 := x_10 - (b - x_10)*y(x_10)/(y(b) - y(x_10))
x_11 → 15.9889044076
x3 - x_11 → 0.000792008417111
x_12 := x_11 - (b - x_11)*y(x_11)/(y(b) - y(x_11))
x_12 → 15.9893561454
x3 - x_12 → 0.000340270691208
x_13 := x_12 - (b - x_12)*y(x_12)/(y(b) - y(x_12))
x_13 → 15.9895502307
x3 - x_13 → 0.000146185306966
x_14 := x_13 - (b - x_13)*y(x_13)/(y(b) - y(x_13))
x_14 → 15.9896336137
x3 - x_14 → 6.28023966254e-5
# Метод деления отрезка пополам
a := 7.5
b := 8.5
1
y(a) → 872.42475
y(b) → -812.62575
y((a + b)/2) → 3.462
(a + b)/2 → 8.0
x2 - (a + b)/2 → 0.0020507837632
a := ((a + b)/2)
2
y(a) → 3.462
y(b) → -812.62575
y((a + b)/2) → -411.81028125
(a + b)/2 → 8.25
x2 - (a + b)/2 → -0.247949216237
b := (a + b)/2
y(a) → 3.462
y(b) → -411.81028125
y((a + b)/2) → -205.903863281
3
(a + b)/2 → 8.125
x2 - (a + b)/2 → -0.122949216237
b := (a + b)/2
4
y(a) → 3.462
y(b) → -205.903863281
y((a + b)/2) → -101.643689941
(a + b)/2 → 8.0625
x2 - (a + b)/2 → -0.0604492162368
b := (a + b)/2
5
y(a) → 3.462
y(b) → -101.643689941
y((a + b)/2) → -49.1953255005
(a + b)/2 → 8.03125
x2 - (a + b)/2 → -0.0291992162368
b := (a + b)/2
y(a) → 3.462
y(b) → -49.1953255005
y((a + b)/2) → -22.892631752
6
(a + b)/2 → 8.015625
x2 - (a + b)/2 → -0.0135742162368
b := (a + b)/2
7
y(a) → 3.462
y(b) → -22.892631752
y((a + b)/2) → -9.72178923512
(a + b)/2 → 8.0078125
x2 - (a + b)/2 → -0.0057617162368
b := (a + b)/2
8
y(a) → 3.462
y(b) → -9.72178923512
y((a + b)/2) → -3.13151059592
(a + b)/2 → 8.00390625
x2 - (a + b)/2 → -0.0018554662368
b := (a + b)/2
y(a) → 3.462
y(b) → -3.13151059592
y((a + b)/2) → 0.164841002628
9
(a + b)/2 → 8.001953125
x2 - (a + b)/2 → 9.76587631975e-5
