N := 8
Nx := 10
n := 52
nx := 20
xL := 0
xR := 2
Δx := (xR - xL)/Nx
Δx = 0.2
Δxr := (xR - xL)/nx
Δxr = 0.1
k := 0 .. nx
xr[k] := xL + k*Δxr
i := 0 .. Nx
x[i] := xL + i*Δx
x = [0; 0.2; 0.4; 0.6; 0.8; 1; 1.2; 1.4; 1.6; 1.8; 2]
f(τ) := (10 + 0.5*N)/(1 + (20 + 0.25*N)*(1 + 0.05*(n - 53))*(τ - 1)^2) → 14.0/(20.9*(τ - 1)^2 + 1)
L0(τ) := sum(f(x[j])*product({
    1 if k == j
    (τ - x[k])/(x[j] - x[k]) otherwise
}, k = 0 .. Nx), j = 0 .. Nx)
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x1[i] := 1 - 1*cos((2*i + 1)*π/(2*(Nx + 1)))
x1 = [0.0101786; 0.090368; 0.24425; 0.459359; 0.718267; 1; 1.28173; 1.54064; 1.75575; 1.90963; 1.98982]
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L1(τ) := sum(f(x1[j])*product({
    1 if k == j
    (τ - x1[k])/(x1[j] - x1[k]) otherwise
}, k = 0 .. Nx), j = 0 .. Nx)
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