h := 1/20
a := -2
b := 3/2
i := 1 .. 40
A[0] := -1
A[i] := A[i - 1] + h
transpose(A) = [
    -1, -0.95, -0.9, -0.85, -0.8, -0.75, -0.7, -0.65, -0.6, -0.55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]
p[i] := A[i]
t := 0 .. 40
q[t] := 4
transpose(q) = [
    4, 4, 4, 4, 4, 4, 4, 4, 4, 4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]
j := 1 .. 39
F :=
    for i ∈ 0 .. 40
        if i == 0
            F[0, 0] ← 1
            for j ∈ 1 .. 40
                F[i, j] ← 0
        if i == 40
            for j ∈ 0 .. 39
                F[i, j] ← 0
            F[i, 40] ← 1
        if i > 0 and i < 40
            if i == 1
                F[i, i - 1] ← 1/h^2 - A[i]/(2*h)
                F[i, i] ← -2/h^2 - q[i]
                F[i, i + 1] ← 1/h^2 + A[i]/(2*h)
                for j ∈ i + 2 .. 40
                    F[i, j] ← 0
            otherwise
                for j ∈ 0 .. i - 2
                    F[i, j] ← 0
                F[i, i - 1] ← 1/h^2 - A[i]/(2*h)
                F[i, i] ← -2/h^2 - q[i]
                F[i, i + 1] ← 1/h^2 + A[i]/(2*h)
                if i ≠ 39
                    for j ∈ i + 2 .. 40
                        F[i, j] ← 0
    return F
F =  # no stored result
k := 1 .. 39
v[0] := a
v[40] := 3*a + 2*b
v[k] := (-A[k]^3 + 12*A[k]^2 + 6*A[k] - 4)*a + (-2*A[k]^2 - 3*A[k] + 2)*b
transpose(v) = [
    -2, 0.59275, 2.522, 4.28925, 5.896, 7.34375, 8.634, 9.76825, 10.748, 11.5748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]
F[1, 0] = 409.5
z := 1 .. 39
L[0] := -F[0, 1]/F[0, 0]
M[0] := v[0]/F[0, 0]
L[z] := -1*F[z, z + 1]/(L[z - 1]*F[z, z - 1] + F[z, z])
M[z] := (v[z] - M[z - 1]*F[z, z - 1])/(L[z - 1]*F[z, z - 1] + F[z, z])
M[40] := (v[40] - M[39]*F[40, 39])/(L[39]*F[40, 39] + F[40, 40])
n := 39 .. 0
x[40] := M[40]
x[n] := L[n]*x[n + 1] + M[n]
transpose(M) = [
    -2, -1.01939, -0.692912, -0.531973, -0.438618, -0.37997, -0.341736, -0.316586, -0.300289, -0.29016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]
transpose(L) = [
    0, 0.485697, 0.645907, 0.724803, 0.771228, 0.801471, 0.822517, 0.837864, 0.849454, 0.858455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]
transpose(x) = [
    -2, -1.98583, -1.98979, -2.00785, -2.03624, -2.07153, -2.11057, -2.15052, -2.18882, -2.22323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]
l := 0 .. 40
τ[l] := -2*A[l]^4 - 2*A[l]^3 + 3/2*A[l]^2 + 3/2*A[l] - 2
transpose(τ) = [
    -2, -1.98551, -1.9892, -2.00701, -2.0352, -2.07031, -2.1092, -2.14901, -2.1872, -2.22151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]
x - τ = [
    0; -0.000317769; -0.000594588; -0.000834734; -0.00104224; -0.00122089; -0.00137423; -0.00150554; -0.00161786; -0.00171399
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]
max(-(x - τ)) = 0.00234602
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h := 1/10
a := -2
b := 3/2
i := 1 .. 2*40
h := (1 + 1)/(2*40) = 0.025
B[0] := -1
B[i] := B[i - 1] + h
p[i] := B[i]
t := 0 .. 80
q[t] := 4
transpose(q) = [
    4, 4, 4, 4, 4, 4, 4, 4, 4, 4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]
j := 1 .. 79
K :=
    for i ∈ 0 .. 80
        if i == 0
            F[0, 0] ← 1
            for j ∈ 1 .. 80
                F[i, j] ← 0
        if i == 80
            for j ∈ 0 .. 79
                F[i, j] ← 0
            F[i, 80] ← 1
        if i > 0 and i < 80
            if i == 1
                F[i, i - 1] ← 1/h^2 - B[i]/(2*h)
                F[i, i] ← -2/h^2 - q[i]
                F[i, i + 1] ← 1/h^2 + B[i]/(2*h)
                for j ∈ i + 2 .. 80
                    F[i, j] ← 0
            otherwise
                for j ∈ 0 .. i - 2
                    F[i, j] ← 0
                F[i, i - 1] ← 1/h^2 - B[i]/(2*h)
                F[i, i] ← -2/h^2 - q[i]
                F[i, i + 1] ← 1/h^2 + B[i]/(2*h)
                if i ≠ 79
                    for j ∈ i + 2 .. 80
                        F[i, j] ← 0
    return F
K =  # no stored result
k := 1 .. 79
v[0] := a
v[80] := -3
v[k] := (-B[k]^3 + 12*B[k]^2 + 6*B[k] - 4)*a + (-2*B[k]^2 - 3*B[k] + 2)*b
v = [
    -2; -0.433094; 0.59275; 1.57772; 2.522; 3.42578; 4.28925; 5.11259; 5.896; 6.63966
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]
F[1, 0] = 409.5
z := 1 .. 79
L[0] := -K[0, 1]/K[0, 0]
M[0] := v[0]/K[0, 0]
L[z] := -1*K[z, z + 1]/(L[z - 1]*K[z, z - 1] + K[z, z])
M[z] := (v[z] - M[z - 1]*K[z, z - 1])/(L[z - 1]*K[z, z - 1] + K[z, z])
M[80] := (v[80] - M[79]*K[80, 79])/(L[79]*K[80, 79] + K[80, 80])
n := 79 .. 0
xx[80] := M[80]
M = [
    -2; -1.01079; -0.680587; -0.515425; -0.416496; -0.350853; -0.304365; -0.269957; -0.243689; -0.223189
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]
L = [
    0; 0.49329; 0.657281; 0.738953; 0.787702; 0.819994; 0.842887; 0.859909; 0.873022; 0.883403
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]
xx[n] := L[n]*xx[n + 1] + M[n]
x = [
    -2; -1.98583; -1.98979; -2.00785; -2.03624; -2.07153; -2.11057; -2.15052; -2.18882; -2.22323
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]
xx = [
    -2; -1.99026; -1.98559; -1.98546; -1.98935; -1.99676; -2.00722; -2.02027; -2.03546; -2.05238
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]
c := 0 .. 40
R[c] := x[c] - xx[2*c]
max(R)/1 = 0
transpose(xx) = [
    -2, -1.99026, -1.98559, -1.98546, -1.98935, -1.99676, -2.00722, -2.02027, -2.03546, -2.05238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]
l := 0 .. 80
τ[l] := -2*B[l]^4 - 2*B[l]^3 + 3/2*B[l]^2 + 3/2*B[l] - 2
transpose(τ) = [
    -2, -1.99022, -1.98551, -1.98534, -1.9892, -1.99658, -2.00701, -2.02003, -2.0352, -2.05209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]
xx - τ = [
    0; -4.10992e-5; -7.94986e-5; -0.000115338; -0.000148752; -0.000179874; -0.000208831; -0.000235748; -0.000260744; -0.000283937
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]
max(-(xx - τ)) = 0.000586986
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