# ОСМ. ДЗ2-1
# Используя метод Рунге-Кутта порядка m=4, четырехшаговый метод Адамса-Башфорта и метод прогноза коррекции (с четвёртым порядком точности) найти численные решения задачи Коши (шаг сетки h=0,05):
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# Графически проиллюстрировать сравнение приближённых решений. Используя практическое правило Рунге, оценить погрешность приближенного решения, используя метод Рунге-Кутта порядка m=4
# Дано:
N := 6
n := 62  # - вариант, группа
a := 0.5
b := 2.5  # - границы интервала
f(t, x) := (2*N + 3)/(N + 2)*(n - 58)*sin((3*N + 3)/((2*N + n - 58)*t)*x)  # - правая часть уравнения
c0 := N/2  # - граничное условие x(a)
f(t, x) → 15*sin(21*x/(16*t))/2
h := 0.05  # - шаг сетки
m := 4  # - порядок точности
# Решение
# 1. Введение сетки
k := (b - a)/h = 40  # - количество узлов
τ[0] := a
i := 1 .. k
τ[i] := τ[i - 1] + h
# 2. Численное решение методом Рунге-Кутта четвёртого порядка
ω1(τ, u) := f(τ, u)
ω2(τ, u) := f(τ + 1/2*h, u + 1/2*h*ω1(τ, u))
ω3(τ, u) := f(τ + 1/2*h, u + 1/2*h*ω2(τ, u))
ω4(τ, u) := f(τ + h, u + h*ω3(τ, u))
u_RK :=
    u[0] ← c0
    for i ∈ 1 .. k
        ω[1] ← ω1(τ[i - 1], u[i - 1])
        ω[2] ← ω2(τ[i - 1], u[i - 1])
        ω[3] ← ω3(τ[i - 1], u[i - 1])
        ω[4] ← ω4(τ[i - 1], u[i - 1])
        u[i] ← u[i - 1] + h/6*(ω[1] + 2*ω[2] + 2*ω[3] + ω[4])
    return u
transpose(u_RK) = [
    3, 3.37221, 3.73454, 4.0856, 4.42743, 4.76256, 5.09308, 5.42048, 5.74575, 6.06956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]
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# 3. Численное решение методом Адамса-Башфорта четвёртого порядка
u_AB :=
    for i ∈ 0 .. m - 1
        u[i] ← u_RK[i]
    for i ∈ m - 1 .. k - 1
        f1 ← f(τ[i], u[i])
        f2 ← f(τ[i - 1], u[i - 1])
        f3 ← f(τ[i - 2], u[i - 2])
        f4 ← f(τ[i - 3], u[i - 3])
        u[i + 1] ← u[i] + h/24*(55*f1 - 59*f2 + 37*f3 - 9*f4)
    return u
transpose(u_AB) = [
    3, 3.37221, 3.73454, 4.0856, 4.42888, 4.76365, 5.09466, 5.4211, 5.74671, 6.06971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]
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# 4. Метод прогноза коррекции
u_PK :=
    for i ∈ 0 .. m - 1
        u[i] ← u_RK[i]
    for i ∈ m - 1 .. k - 1
        f1 ← f(τ[i], u[i])
        f2 ← f(τ[i - 1], u[i - 1])
        f3 ← f(τ[i - 2], u[i - 2])
        f4 ← f(τ[i - 3], u[i - 3])
        u0 ← u[i] + h/24*(55*f1 - 59*f2 + 37*f3 - 9*f4)
        f0 ← f(τ[i + 1], u0)
        u[i + 1] ← u[i] + h/24*(9*f0 + 19*f1 - 5*f2 + f3)
    return u
transpose(u_PK) = [
    3, 3.37221, 3.73454, 4.0856, 4.4272, 4.76231, 5.09289, 5.42034, 5.74565, 6.0695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]
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# 5. Оценка погрешности по правилу Рунге
# |
# |
# |введение новой сетки в 2 раза больше |первоначальной
# |
# |
h := h/2
k := (b - a)/h = 80
s[0] := a
i := 1 .. k
s[i] := s[i - 1] + h
u[0] := c0
i := 1 .. k  # решение на новой сетке методом Рунге-Кутта
u[i] := u[i - 1] + h/6*(ω1(s[i - 1], u[i - 1]) + 2*ω2(s[i - 1], u[i - 1]) + 2*ω3(s[i - 1], u[i - 1]) + ω4(s[i - 1], u[i - 1]))
i := 0 .. k/2
u_RK2[i] := u[2*i]  # - берём только значения решения в узлах первоначальной сетки
i := 0 .. k/2
transpose(u_RK2) = [
    3, 3.37009, 3.73011, 4.07988, 4.42139, 4.75682, 5.08792, 5.41598, 5.7419, 6.0663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]
δ[i] := |u_RK[i] - u_RK2[i]|
ε := max(δ)/(2^m - 1) = 0.000402087  # - вычисление погрешности
