N := 6
n := 62
h := 0.05
a := 0
b := 1
β := N/2 → 3
α := 1/(64 - n)
k := (b - a)/h = 20
f(t, x) := -2*β + α*β*π*(x - x^2)/2*cos(π/2*t) - 2*α*β*sin(π/2*t) → 3*π*cos(π*t/2)*(x - x^2)/4 - 3*sin(π*t/2) - 6
G :=
    for i ∈ 1 .. k - 1
        G[i, i - 1] ← -1/h
        G[i, i] ← 1 + 2/h
        G[i, i + 1] ← -1/h
    for i ∈ 0 .. k
        G[k, i] ← 0
    G
initial(x) := 2*β*x*(1 - x) + 2*β → 6 - 6*x*(x - 1)
boundary(t) := 2*β*(1 - t) → 6 - 6*t
i := 0 .. k
τ[i] := i*h
τ = [0; 0.05; 0.1; 0.15; 0.2; 0.25; 0.3; 0.35; 0.4; 0.45; 0.5; 0.55; 0.6; 0.65; 0.7; 0.75; 0.8; 0.85; 0.9; 0.95; 1]
G = [
    0, 0, 0, 0, 0, 0, 0, 0, 0, 0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;
    -20, 41, -20, 0, 0, 0, 0, 0, 0, 0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;
    0, -20, 41, -20, 0, 0, 0, 0, 0, 0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;
    0, 0, -20, 41, -20, 0, 0, 0, 0, 0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;
    0, 0, 0, -20, 41, -20, 0, 0, 0, 0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;
    0, 0, 0, 0, -20, 41, -20, 0, 0, 0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;
    0, 0, 0, 0, 0, -20, 41, -20, 0, 0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;
    0, 0, 0, 0, 0, 0, -20, 41, -20, 0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;
    0, 0, 0, 0, 0, 0, 0, -20, 41, -20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;
    0, 0, 0, 0, 0, 0, 0, 0, -20, 41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;
    0, 0, 0, 0, 0, 0, 0, 0, 0, -20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;
    0, 0, 0, 0, 0, 0, 0, 0, 0, 0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;
    0, 0, 0, 0, 0, 0, 0, 0, 0, 0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;
    0, 0, 0, 0, 0, 0, 0, 0, 0, 0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;
    0, 0, 0, 0, 0, 0, 0, 0, 0, 0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;
    0, 0, 0, 0, 0, 0, 0, 0, 0, 0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;
    0, 0, 0, 0, 0, 0, 0, 0, 0, 0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;
    0, 0, 0, 0, 0, 0, 0, 0, 0, 0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;
    0, 0, 0, 0, 0, 0, 0, 0, 0, 0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;
    0, 0, 0, 0, 0, 0, 0, 0, 0, 0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;
    0, 0, 0, 0, 0, 0, 0, 0, 0, 0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]
φ_exp :=
    for i ∈ 0 .. k
        φ_exp[0, i] ← initial(τ[i])
    for i ∈ 1 .. k
        β_vec[0] ← boundary(τ[i])
        β_vec[k] ← boundary(τ[i])
        f_vec[0] ← 0
        f_vec[k] ← 0
        for j ∈ 1 .. k - 1
            f_vec[j] ← f(τ[i - 1], τ[j])
        result ← G*transpose(φ_exp)[:, i - 1] + β_vec + h*f_vec
        for j ∈ 0 .. k
            φ_exp[i, j] ← result[j]
    φ_exp
φ_exp = [
    6, 6.285, 6.54, 6.765, 6.96, 7.125, 7.26, 7.365, 7.44, 7.485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;
    5.7, 0, 0, 0, 0, 0, 0, 0, 0, 0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;
    5.4, 0, 0, 0, 0, 0, 0, 0, 0, 0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;
    5.1, 0, 0, 0, 0, 0, 0, 0, 0, 0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;
    4.8, 0, 0, 0, 0, 0, 0, 0, 0, 0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;
    4.5, 0, 0, 0, 0, 0, 0, 0, 0, 0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;
    4.2, 0, 0, 0, 0, 0, 0, 0, 0, 0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;
    3.9, 0, 0, 0, 0, 0, 0, 0, 0, 0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;
    3.6, 0, 0, 0, 0, 0, 0, 0, 0, 0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;
    3.3, 0, 0, 0, 0, 0, 0, 0, 0, 0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;
    3, 0, 0, 0, 0, 0, 0, 0, 0, 0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;
    2.7, 0, 0, 0, 0, 0, 0, 0, 0, 0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;
    2.4, 0, 0, 0, 0, 0, 0, 0, 0, 0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;
    2.1, 6.1361e20, -9.60521e20, 9.54351e20, -7.0934e20, 4.12456e20, -1.89779e20, 0, 0, 0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;
    1.8, 4.43684e22, -7.07406e22, 7.25256e22, -5.64191e22, 3.48931e22, -1.74053e22, 7.00037e21, -2.24749e21, 5.77391e20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;
    1.5, 3.23392e24, -5.23824e24, 5.51674e24, -4.46155e24, 2.9071e24, -1.55149e24, 6.80071e23, -2.43702e23, 7.28806e22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;
    1.2, 2.37355e26, -3.89781e26, 4.20182e26, -3.51401e26, 2.39452e26, -1.35354e26, 6.37867e25, -2.50508e25, 8.49863e24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;
    0.9, 1.75272e28, -2.91318e28, 3.20511e28, -2.76001e28, 1.95526e28, -1.16143e28, 5.82336e27, -2.47279e27, 9.33861e26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;
    0.6, 1.30125e30, -2.18597e30, 2.44873e30, -2.16368e30, 1.58595e30, -9.83707e29, 5.205e29, -2.36529e29, 9.80034e28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;
    0.3, 9.70707e31, -1.64624e32, 1.87391e32, -1.69404e32, 1.27972e32, -8.24609e31, 4.57452e31, -2.20678e31, 9.91644e30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;
    0, 7.27239e33, -1.24388e34, 1.43636e34, -1.32528e34, 1.02841e34, -6.85523e33, 3.96613e33, -2.01801e33, 9.74208e32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]
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H :=
    for i ∈ 0 .. k
        H[i, i] ← 1 if i == 0
        H[i, i] ← 1 if i == k
        otherwise
            for j ∈ 0 .. k
                H[i, i - 1] ← -1/h
                H[i, i] ← 1 + 2/h
                H[i, i + 1] ← -1/h
    H
H = [
    1, 0, 0, 0, 0, 0, 0, 0, 0, 0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;
    -20, 41, -20, 0, 0, 0, 0, 0, 0, 0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;
    0, -20, 41, -20, 0, 0, 0, 0, 0, 0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;
    0, 0, -20, 41, -20, 0, 0, 0, 0, 0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;
    0, 0, 0, -20, 41, -20, 0, 0, 0, 0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;
    0, 0, 0, 0, -20, 41, -20, 0, 0, 0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;
    0, 0, 0, 0, 0, -20, 41, -20, 0, 0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;
    0, 0, 0, 0, 0, 0, -20, 41, -20, 0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;
    0, 0, 0, 0, 0, 0, 0, -20, 41, -20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;
    0, 0, 0, 0, 0, 0, 0, 0, -20, 41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;
    0, 0, 0, 0, 0, 0, 0, 0, 0, -20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;
    0, 0, 0, 0, 0, 0, 0, 0, 0, 0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;
    0, 0, 0, 0, 0, 0, 0, 0, 0, 0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;
    0, 0, 0, 0, 0, 0, 0, 0, 0, 0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;
    0, 0, 0, 0, 0, 0, 0, 0, 0, 0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;
    0, 0, 0, 0, 0, 0, 0, 0, 0, 0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;
    0, 0, 0, 0, 0, 0, 0, 0, 0, 0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;
    0, 0, 0, 0, 0, 0, 0, 0, 0, 0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;
    0, 0, 0, 0, 0, 0, 0, 0, 0, 0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;
    0, 0, 0, 0, 0, 0, 0, 0, 0, 0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;
    0, 0, 0, 0, 0, 0, 0, 0, 0, 0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]
φ_imp :=
    for i ∈ 0 .. k
        φ_imp[0, i] ← initial(τ[i])
    for i ∈ 1 .. k
        β1_vec[0] ← boundary(τ[i - 1])
        β1_vec[k] ← boundary(τ[i - 1])
        β2_vec[0] ← boundary(τ[i])
        β2_vec[k] ← boundary(τ[i])
        f_vec[0] ← 0
        f_vec[k] ← 0
        for j ∈ 1 .. k - 1
            f_vec[j] ← f(τ[i], τ[j])
        right_side_vec ← transpose(φ_imp)[:, i - 1] - β1_vec + β2_vec + h*f_vec
        p ← -1/h
        q ← 1 + 2/h
        r ← -1/h
        L[0] ← 0/q
        K[0] ← right_side_vec[0]/1
        for n ∈ 1 .. k - 1
            L[n] ← -r/(L[n - 1]*p + q)
            K[n] ← (right_side_vec[n] - K[n - 1]*p)/(L[n - 1]*p + q)
        K[k] ← (right_side_vec[k] - K[k - 1]*0)/(L[k - 1]*0 + 1)
        φ_imp[i, k] ← K[k]
        for n ∈ k - 1 .. 0
            φ_imp[i, n] ← L[n]*φ_imp[i, n + 1] + K[n]
    φ_imp
φ_imp = [
    6, 6.285, 6.54, 6.765, 6.96, 7.125, 7.26, 7.365, 7.44, 7.485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;
    5.7, 5.86907, 6.03266, 6.18594, 6.32511, 6.44718, 6.54985, 6.63136, 6.69045, 6.72624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;
    5.4, 5.50938, 5.61667, 5.71881, 5.81303, 5.89689, 5.96831, 6.02561, 6.06747, 6.09296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;
    5.1, 5.16996, 5.23943, 5.30627, 5.3685, 5.42434, 5.47223, 5.51087, 5.53921, 5.55652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;
    4.8, 4.8421, 4.88485, 4.9267, 4.96616, 5.00193, 5.03285, 5.05794, 5.07642, 5.08774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;
    4.5, 4.52169, 4.54497, 4.56864, 4.59158, 4.61279, 4.63139, 4.64665, 4.65798, 4.66495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;
    4.2, 4.20626, 4.21491, 4.22498, 4.23561, 4.246, 4.25547, 4.26345, 4.26949, 4.27324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;
    3.9, 3.89421, 3.89149, 3.89107, 3.89224, 3.89435, 3.89685, 3.89929, 3.9013, 3.90261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;
    3.6, 3.58448, 3.57265, 3.56386, 3.55751, 3.55307, 3.55007, 3.54815, 3.547, 3.54639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;
    3.3, 3.27637, 3.257, 3.24131, 3.22879, 3.21899, 3.21152, 3.20606, 3.20233, 3.20018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;
    3, 2.96944, 2.94364, 2.9221, 2.90437, 2.89006, 2.87882, 2.87038, 2.86451, 2.86105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;
    2.7, 2.66338, 2.63199, 2.60537, 2.58313, 2.56491, 2.55043, 2.53942, 2.5317, 2.52713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;
    2.4, 2.35802, 2.32167, 2.29056, 2.26433, 2.24268, 2.22534, 2.21208, 2.20273, 2.19718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;
    2.1, 2.05321, 2.01243, 1.97731, 1.94753, 1.92281, 1.90292, 1.88765, 1.87686, 1.87042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;
    1.8, 1.74891, 1.70415, 1.66543, 1.63245, 1.60497, 1.58278, 1.56571, 1.55361, 1.54639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;
    1.5, 1.44505, 1.39674, 1.35477, 1.31892, 1.28896, 1.2647, 1.246, 1.23273, 1.2248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;
    1.2, 1.14163, 1.09014, 1.04528, 1.00686, 0.974668, 0.948557, 0.928388, 0.914058, 0.90549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;
    0.9, 0.838632, 0.784342, 0.73693, 0.696219, 0.662048, 0.634281, 0.612805, 0.597529, 0.588389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;
    0.6, 0.536053, 0.47934, 0.429702, 0.386993, 0.351083, 0.321859, 0.299229, 0.283118, 0.273472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;
    0.3, 0.233895, 0.175138, 0.123605, 0.0791856, 0.0417787, 0.0112968, -0.0123333, -0.0291698, -0.0392548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;
    0, -0.0678358, -0.128258, -0.18135, -0.22719, -0.265849, -0.297389, -0.321863, -0.339314, -0.349772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]
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Given
u_t(x, t) == u_xx(x, t) - 2*β + α*β*π*(x - x^2)/2*cos(π/2*t) - 2*α*β*sin(π/2*t)
u(0, t) == 2*β*(1 - t)
u(1, t) == 2*β*(1 - t)
u(x, 0) == 2*β*x*(1 - x) + 2*β
φ_an := Pdesolve(u, x, [0; 1], t, [0; 1], 100, 100)
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φ_an(0.5, 1) = -0.355777
φ_an(0.5, 0.5) = 2.84328
φ_imp[20, 10] = -0.353256
φ_imp[10, 10] = 2.85991
i := 0 .. 20
diff2[i] := |φ_imp[20, i] - φ_an(i/20, 1)|
max(diff2) = 0.00252071
Неявная
diff1[i] := |φ_imp[10, i] - φ_an(i/20, 0.5)|
max(diff1) = 0.376474
diff2[i] := |φ_exp[20, i] - φ_an(i/20, 1)|
max(diff2) = 1.43636e34
Явная
diff1[i] := |φ_exp[10, i] - φ_an(i/20, 0.5)|
max(diff1) = 2.50057e15
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