# Вариант 8
x := [
    0.415, 0.42, 0.12, 0.506, 1.074, 0.532, 0.016, 0.025, 0.434, 0.387;
    0.448, 0.263, 0.069, 1.107, 1.052, 0.246, 0.443, 0.234, 0.064, 0.387;
    0.097, 0.478, 0.135, 0.066, 1.259, 0.381, 0.011, 0.128, 0.004673, 0.088;
    0.142, 1.029, 0.204, 0.279, 0.107, 0.187, 0.056, 0.56, 0.512, 0.07;
    0.024, 0.215, 0.253, 2.073, 0.119, 0.215, 0.056, 0.512, 0.407, 0.55;
    0.085, 0.043, 0.055, 0.595, 0.565, 0.128, 0.171, 0.065, 0.391, 0.052;
    0.313, 0.108, 0.041, 0.065, 0.201, 0.255, 0.122, 0.5, 0.735, 0.036;
    0.228, 0.38, 0.255, 0.117, 0.319, 0.086, 0.362, 0.328, 0.33, 0.075;
    0.604, 0.207, 0.202, 0.127, 0.06, 0.127, 0.262, 0.119, 0.066, 0.464;
    0.025, 0.323, 0.137, 0.831, 0.46, 0.606, 0.054, 0.417, 0.101, 0.284;
    0.915, 0.283, 0.143, 0.038, 0.078, 0.673, 0.218, 0.312, 0.367, 1.008;
    0.067, 1.118, 0.603, 0.563, 1.246, 0.108, 0.124, 0.156, 0.951, 0.94
]
ORIGIN := 1
n := 120
# 1) Крайние члены вариационного ряда и размах выборки
max(x) = 2.073
min(x) = 0.004673
ω := max(x) - min(x)
ω = 2.06833
# 2) Число интервалов
l := trunc(1 + 3.32*log(n))
l = 7
# 3) Группировка и построение гистограммы
h := ω/l
h = 0.295475  # - ширина интервальной группировки
f := histogram(l, x)
p := f[:, 2]/n  # - относительная частота
fl := p/h  # - высота столбцов гистограммы
f = [0.152411, 69; 0.447886, 33; 0.743361, 6; 1.03884, 9; 1.33431, 2; 1.62979, 0; 1.92526, 1]
p = [0.575; 0.275; 0.05; 0.075; 0.0166667; 0; 0.00833333]
fl = [1.94602; 0.930704; 0.169219; 0.253828; 0.0564063; 0; 0.0282031]
int := f[:, 1]
intl := int - h/2
intl[8] := max(x)
int = [0.152411; 0.447886; 0.743361; 1.03884; 1.33431; 1.62979; 1.92526]
intl = [0.004673; 0.300148; 0.595624; 0.891099; 1.18657; 1.48205; 1.77752; 2.073]  # - середины столбцов гистограммы
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# 4) Находим выборочные характеристики
xm := 1/n*sum(sum(x[i, j], j = 1 .. 10), i = 1 .. 12)
xm = 0.340439  # - выборочное среднее
s2 := 1/(n - 1)*sum(sum((x[i, j] - xm)^2, j = 1 .. 10), i = 1 .. 12)
s2 = 0.115364  # - выборочная дисперсия
# 5) Определяем закон распределенния по виду гистограммы
#
# По виду гистограммы заключаем, что распределение эмпирических частот похоже на показательный закон
# 6) Оценка параметров
# Mξ = ... = 1/λ
Mξ := integral(xp[ξ], x = -∞ .. ∞) = integral(xλe^(-λx), x = 0 .. ∞)  # error: This variable is undefined.
□ = 1/λ  # error: This placeholder is empty.
# Mξ = xm  =>  λ = 1/xm
λ := 1/xm
λ = 2.93738
# 7) Строим совмещенные графики
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# 8) Построение эмпирической функции распределения
i := 1 .. 7
kum[1] := 0
kum[i + 1] := kum[i] + p[i]
femp(z) :=
    0 if z < min(x)
    kum[1] if min(x) ≤ z < int[1]
    kum[2] if int[1] ≤ z < int[2]
    kum[3] if int[2] ≤ z < int[3]
    kum[4] if int[3] ≤ z < int[4]
    kum[5] if int[4] ≤ z < int[5]
    kum[6] if int[5] ≤ z < int[6]
    kum[7] if int[6] ≤ z < int[7]
    1 if z ≥ int[7]
kum = [0; 0.575; 0.85; 0.9; 0.975; 0.991667; 0.991667; 1]
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