# Задача 2
# Исходные данные:
# Номер варианта: 8
# Количество испытаний
k := 15
# Вероятность успеха в одном испытании
p := 0.8
# Объем выборки
n := 180
# 1. Находим теоретический закон
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# Обозначим p_j как p1_j - вероятность того, что случайная величина ξ примет значение j
j := 0 .. k
p1[j] := k!/(j!*(k - j)!)*p^j*(1 - p)^(k - j)
# Проверка правильности вычисления вероятностей:
sum := sum(p1[j], j) = 1
p1 = [3.2768e-11; 1.96608e-9; 5.50502e-8; 9.54204e-7; 1.14504e-5; 0.000100764; 0.00067176; 0.00345476; 0.0138191; 0.0429926; 0.103182; 0.187604; 0.250139; 0.230897; 0.131941; 0.0351844]
# Кумулятивные вероятности:
j := 1 .. k
u[0] := p1[0]
u[j] := u[j - 1] + p1[j]
u = [3.2768e-11; 1.99885e-9; 5.70491e-8; 1.01125e-6; 1.24617e-5; 0.000113226; 0.000784985; 0.00423975; 0.0180588; 0.0610514; 0.164234; 0.351838; 0.601977; 0.832874; 0.964816; 1]
# 2. Моделирум вектор из n случайных чисел
i := 0 .. n - 1
y[i] := rnd(1)
transpose(y) = [
    0.160346, 0.577004, 0.21235, 0.0306634, 0.456676, 0.283688, 0.633759, 0.703726, 0.389589, 0.136852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]
# 3. По вектору y разыгрываем вектор x в соответствии с алгоритмом
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# x - выборка из случайной величины ξ
x[i] :=
    a ← 0
    for j ∈ 0 .. k
        break if y[i] < u[j]
        a ← a + 1
    a
transpose(x) = [
    10, 12, 11, 9, 12, 11, 13, 13, 12, 10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]
# 4. Строим статистический ряд (как в ДЗ1)
# 1) Крайние члены вариационного ряда и размах выборки
max(x) = 15
min(x) = 8
ω := max(x) - min(x)
ω = 7
l := 8
# 2) Интервалы группировки
x1 := [-0.5, 0.5, 1.5, 2.5, 3.5, 4.5, 5.5, 6.5, 7.5, 8.5, 9.5, 10.5, 11.5, 12.5, 13.5, 14.5, 15.5, 16.5]
# 3) Группировка
h := 1
f := histogram(transpose(x1), x)
freq_rel := f[:, 1]/n  # - относительные частоты
j := 1 .. k
freq_acc[0] := freq_rel[0]
freq_acc[j] := freq_acc[j - 1] + freq_rel[j]  # - накопленные частоты
transpose(f) = [
    0, 1, 2, 3, 4, 5, 6, 7, 8, 9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;
    0, 0, 0, 0, 0, 0, 0, 0, 2, 10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]
freq_acc = [0; 0; 0; 0; 0; 0; 0; 0; 0.0111111; 0.0666667; 0.188889; 0.444444; 0.694444; 0.85; 0.966667; 1]
f = [
    0, 0;
    1, 0;
    2, 0;
    3, 0;
    4, 0;
    5, 0;
    6, 0;
    7, 0;
    8, 2;
    9, 10;
    10, 22;
    11, 46;
    12, 45;
    13, 28;
    14, 21;
    15, 6;
    16, 0
]
freq_rel = [0; 0; 0; 0; 0; 0; 0; 0; 0.0111111; 0.0555556; 0.122222; 0.255556; 0.25; 0.155556; 0.116667; 0.0333333; 0]
# 5. Находим эмпирическую и теоретическую функцию распределения
F_emp(y) :=
    for j ∈ 1 .. k - 1
        break if f[:, 0][j - 1] < y ≤ f[:, 0][j]
        a ← freq_acc[j]
    a
    1 if y > f[:, 0][k]
    0 if y ≤ f[:, 0][0]
F_teor(y) :=
    for j ∈ 1 .. k
        break if j - 1 < y ≤ j
        a ← u[j]
    a
    1 if y > k
    0 if y ≤ 0
# 6. Совмещенные графики
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# 7. Вычисляем статистику Колмогорова
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j := 0 .. k
K[j] := |F_emp(j) - F_teor(j)|
K_stat := max(K) = 0.0926065
K = [0; 0; 1.99885e-9; 5.70491e-8; 1.01125e-6; 1.24617e-5; 0.000113226; 0.000784985; 0.00423975; 0.0069477; 0.00561524; 0.0246552; 0.0926065; 0.0924677; 0.0171258; 0.00185104]
# 8. Вычисляем выборочное среднее и выборочную дисперсию
# Выборочное среднее
Mμ := mean(x) = 11.7778
# Выборочная дисперсия
S2 := 1/(n - 1)*sum((x[i] - Mμ)^2, i = 0 .. n - 1) = 2.30788
# Истинные значения:
# Математическое ожидание:
M := sum(i*p1[i], i = 0 .. k) = 12
# Дисперсия
D := sum((i - M)^2*p1[i], i = 0 .. k) = 2.4
# Сравнение характеристик с истинными значениями:
Mμ - M = -0.222222
S2/D = 0.961618
