# Задание 3
# Условия задачи:
# Вариант 8
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# Плотность распределения p(x):
# Объем выборки:
n := 120
# 1. Находим функцию распределения
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# Обратная функция
# 2. Моделируем вектор из n случайных чисел, распределенных по закону p(x)
# Вспомогательный вектор
i := 0 .. n - 1
y[i] := rnd(1)
transpose(y) = [
    0.558868, 0.0695998, 0.176343, 0.857957, 0.639047, 0.930729, 0.884504, 0.179928, 0.0272882, 0.419187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]
# Значение моделируемй случайной величины
x[i] := nthroot(ln(1 - y[i])^2, 5)
transpose(x) = [
    0.922973, 0.349359, 0.518946, 1.30665, 1.00756, 1.48111, 1.36039, 0.523582, 0.238116, 0.783473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]
# 3. Обработка полученных данных
# 1) Крайние члены вариационного ряда и размах выборки
max(x) = 2.20262
min(x) = 0.183203
ω := max(x) - min(x)
ω = 2.01942
# 2) Число интервалов
l := trunc(1 + 3.32*log(n))
l = 7
# 3) Группировка для построения гистограммы
h := ω/l
h = 0.288488  # - ширина интервальной группировки
f := histogram(l, x)
p := f[:, 1]/n  # - относительная частота
fl := p/h  # - высота столбцов гистограммы
f = [0.327447, 19; 0.615935, 29; 0.904423, 36; 1.19291, 17; 1.4814, 12; 1.76989, 5; 2.05838, 2]
p = [0.158333; 0.241667; 0.3; 0.141667; 0.1; 0.0416667; 0.0166667]
fl = [0.548838; 0.8377; 1.0399; 0.491066; 0.346634; 0.144431; 0.0577724]
int := f[:, 0]
intl := int - h/2
intl[6] := max(x)
int = [0.327447; 0.615935; 0.904423; 1.19291; 1.4814; 1.76989; 2.05838]
intl = [0.183203; 0.471691; 0.760179; 1.04867; 1.33716; 1.62564; 2.20262]  # - середины столбцов гистограммы
# 4) Подготовка к построению графика функции
y(x) := 2.5*x*e^(-x^2.5)
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# 4) Находим выборочные характеристики
xm := 1/n*sum(sum(x[i, j], j = 1 .. 10), i = 1 .. 12)  # error: This array index is invalid for this array.
xm =  # error: This variable is undefined.  # - выборочное среднее
s2 := 1/(n - 1)*sum(sum((x[i, j] - xm)^2, j = 1 .. 10), i = 1 .. 12)  # error: This variable is undefined.
s2 =  # error  # - выборочная дисперсия
