# Задача 4
# Исходные данные:
# Номер варианта: 8 | Уровни доверия:
# Количество испытаний
k := 15
α1 := 0.1
α2 := 0.05
α3 := 0.02
# Вероятность успеха в одном испытании
p := 0.8
# Объем выборки
n := 180
# 1. Находим теоретический закон
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# Обозначим p_j как p1_j - вероятность того, что случайная величина ξ примет значение j
j := 0 .. k
p1[j] := k!/(j!*(k - j)!)*p^j*(1 - p)^(k - j)
p1 = [3.2768e-11; 1.96608e-9; 5.50502e-8; 9.54204e-7; 1.14504e-5; 0.000100764; 0.00067176; 0.00345476; 0.0138191; 0.0429926; 0.103182; 0.187604; 0.250139; 0.230897; 0.131941; 0.0351844]
# Проверка правильности вычисления вероятностей:
sum := sum(p1[j], j) = 1
# Кумулятивные вероятности:
j := 1 .. k
u[0] := p1[0]
u[j] := u[j - 1] + p1[j]
u = [3.2768e-11; 1.99885e-9; 5.70491e-8; 1.01125e-6; 1.24617e-5; 0.000113226; 0.000784985; 0.00423975; 0.0180588; 0.0610514; 0.164234; 0.351838; 0.601977; 0.832874; 0.964816; 1]
# 2. Моделирум вектор из n случайных чисел
i := 0 .. n - 1
y[i] := rnd(1)
transpose(y) = [
    0.01114, 0.165268, 0.747813, 0.753725, 0.708288, 0.727264, 0.597366, 0.351849, 0.114991, 0.678383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]
# 3. По вектору y разыгрываем вектор x в соответствии с алгоритмом
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# x - выборка из случайной величины ξ
x[i] :=
    a ← 0
    for j ∈ 0 .. k
        break if y[i] < u[j]
        a ← a + 1
    a
transpose(x) = [
    8, 11, 13, 13, 13, 13, 12, 12, 10, 13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]
# 4. Находим верхнюю и нижнюю границы доверительного интервала для параметра p для уровней доверия α1, α2, α3
# Способ 1 - центральная предельная теорема
x_summ := sum(x[i], i = 0 .. n - 1) = 2161
N_stat(ρ) := (x_summ - n*k*ρ)/sqrt(n*k*ρ*(1 - ρ))
# Тогда приближенные доверительные интервалы параметра p:
# Верхняя оценка параметра р:
p_up(α) := root(N_stat(ρ) - qnorm(α/2, 0, 1), ρ, 0.1, 0.9)
# Нижняя оценка параметра р:
p_down(α) := root(N_stat(ρ) - qnorm(1 - α/2, 0, 1), ρ, 0.1, 0.9)
# Для трех заданных уровней доверия имеем следующие значения оценок:
p_up(α1) = 0.812714
p_up(α2) = 0.815011
p_up(α3) = 0.817653
p_down(α1) = 0.787419
p_down(α2) = 0.784871
p_down(α3) = 0.781882
# Способ 2 - статистика Клопера-Пирсона
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# Теоретическая функция такой статистики биноминальна:
# Вычислить верхнюю и нижнюю границы доверительного интервала можно также двумя способами:
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# 1 вариант. воспользоваться тем, что для каждого р существуют такие
# что
# Тогда значения С1 и С2 представляют собой квантили уровней α/2 и 1-α/2 для биноминального закона B(nk,p)
C1(ρ, α) := qbinom(α/2, n*k, ρ)
C2(ρ, α) := qbinom(1 - α/2, n*k, ρ)
# Построим графики границ С1, С2. Точки пересечения этих линий с линией x_summ - и есть верхняя и нижняя границы доверительного интервала
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# Значения нижней и верхней границы для различных уровней доверия:
# Для α1:
root(C1(ρ, α1) - x_summ, ρ, 0.1, 0.9) = 0.81286
root(C2(ρ, α1) - x_summ, ρ, 0.1, 0.9) = 0.787576
# Для α2:
root(C1(ρ, α2) - x_summ, ρ, 0.1, 0.9) = 0.815086
root(C2(ρ, α2) - x_summ, ρ, 0.1, 0.9) = 0.785127
# Для α3:
root(C1(ρ, α3) - x_summ, ρ, 0.1, 0.9) = 0.817649
root(C2(ρ, α3) - x_summ, ρ, 0.1, 0.9) = 0.781898
# 2 вариант. решить уравнения Клопера-Пирсона:
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# Уравнения можно переписать, используя неполную бета-функцию:
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# Тогда функции, описывающие нижнюю и верхнюю границы имеют вид:
p2_up(α) := qbeta(1 - α/2, x_summ + 1, n*k - x_summ)
p2_down(α) := qbeta(α/2, x_summ + 1, n*k - x_summ)
# Значения верхней и нижней границы для различных уровней доверия:
p2_up(α1) = 0.812964
p2_up(α2) = 0.815301
p2_up(α3) = 0.817999
p2_down(α1) = 0.787672
p2_down(α2) = 0.785166
p2_down(α3) = 0.782235
# 5. Сравнение значений оценок
# 6. График совмещенных функций при α=0.05 при использовании оценок границ доверительных интервалов через статистику К_n, вычисляемую 1 способом
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