# Задача 5
# Исходные данные:
# Номер варианта: 8 | Н2: a < a0
# Уровень доверия:
α := 0.05  # H3: σ > σ0
# Ошибка первого рода?
a0 := -2
# H1: a = a1
a1 := -2.5
σ0 := 1.7
σ1 := 1.75  # Н0: a = a0
ε := 0.1  # Н01: σ = σ0
# Объем выборки:
n := 80
x := [
    -7.934, -4.058, -2.114, -3.192, -0.833, -4.188, -1.501, -3.423, -4.898, -4.386;
    1.593, -4.623, -6.764, -2.357, -2.036, -4.244, -2.723, -5.344, -1.09, -2.41;
    -0.421, 0.569, -2.322, -2.671, -0.537, -1.112, 2.407, -1.99, -3.624, -0.709;
    -3.069, -1.672, -6.772, -3.571, -2.1, -0.728, -2.568, -1.321, -2.69, -1.317;
    -2.048, -1.37, -2.172, -4.354, -2.84, -2.423, -1.277, -4.225, -2.537, -1.557;
    -4.385, -4.432, -1.593, -2.833, 0.8, -4.341, -0.841, -4.071, -0.872, -4.323;
    -1.386, -3.551, -1.647, -1.441, -4.588, -0.749, -2.423, -2.835, 0.449, -2.276;
    -2.628, -0.658, -2.699, 1.314, -1.347, -4.041, -0.714, -2.496, -5.954, -2.171
]
# 0. Первоначальная обработка статистических данных
# 1) Крайние члены вариационного ряда и размах выборки
max(x) = 2.407
min(x) = -7.934
ω := max(x) - min(x)
ω = 10.341
# 2) Число интервалов
l := trunc(1 + 3.32*log(n))
l = 7
# 3) Группировка и построение гистограммы
h := ω/l
h = 1.47729  # - ширина интервальной группировки
f := histogram(l, x)
p := f[:, 1]/n  # - относительные частоты
fl := p/h  # - высоты столбцов гистограммы
transpose(f) = [-7.19536, -5.71807, -4.24079, -2.7635, -1.28621, 0.191071, 1.66836; 3, 2, 18, 26, 23, 5, 3]
f = [-7.19536, 3; -5.71807, 2; -4.24079, 18; -2.7635, 26; -1.28621, 23; 0.191071, 5; 1.66836, 3]
p = [0.0375; 0.025; 0.225; 0.325; 0.2875; 0.0625; 0.0375]
fl = [0.0253844; 0.0169229; 0.152306; 0.219998; 0.194614; 0.0423073; 0.0253844]
transpose(p) = [0.0375, 0.025, 0.225, 0.325, 0.2875, 0.0625, 0.0375]
transpose(fl) = [0.0253844, 0.0169229, 0.152306, 0.219998, 0.194614, 0.0423073, 0.0253844]
int := f[:, 0]
intl := int - h/2
intl[7] := max(x)
transpose(int) = [-7.19536, -5.71807, -4.24079, -2.7635, -1.28621, 0.191071, 1.66836]
transpose(intl) = [-7.934, -6.45671, -4.97943, -3.50214, -2.02486, -0.547571, 0.929714, 2.407]
int = [-7.19536; -5.71807; -4.24079; -2.7635; -1.28621; 0.191071; 1.66836]
intl = [-7.934; -6.45671; -4.97943; -3.50214; -2.02486; -0.547571; 0.929714; 2.407]  # - середины столбцов гистограммы
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# 4) Находим выборочные характеристики
xm := mean(x) = -2.45348  # - выборочное среднее
s2 := 1/(n - 1)*sum(sum((x[i, j] - xm)^2, j = 0 .. 9), i = 0 .. 7) = 3.52649  # - выборочная дисперсия
sqrt(s2) = 1.8779
# 1. Построим критерий S2 уровня α и проверим гипотезу H0: a = a0 (=-2) против левосторонней альтернативы H2: a<a0 если σ неизвестно
# Критическое множество:
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# Статистика...
# Ошибка первого рода...
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# Выразим С2:
C2 := a0 + qt(α, n - 1)*sqrt(s2)/sqrt(n) = -2.34944
# xm принадлежит критическому множеству (-2.453)<-2.349) следовательно гипотеза H0 отвергается
# 2. Построим критерий S3 уровня α и проверим гипотезу H01: σ = σ0 (=1.7) против правосторонней альтернативы H3: σ>σ0 если σ неизвестно
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# Критическое множество:
# Статистика...
# Ошибка первого рода...
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# Выразим С3:
C3 := σ0^2*qchisq(1 - α, n - 1)/(n - 1) = 3.68561
# S2 не принадлежит критическому множеству (3.526)не >3.686) следовательно гипотеза H0 принимается
# 3. Построим критерий S1 уровня α и проверим гипотезу H0: a=a0 (=-2) против простой альтернативы H1: a=a1 (=-2.5) если известно σ = σ1 (=1.75)
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# Критическое множество:
# Статистика...
# Ошибка первого рода...
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# Выразим С1:
C1 := a0 + σ1*qnorm(α, 0, 1)/sqrt(n) = -2.32183
# xm принадлежит критическому множеству (-2.453)<-2.322) следовательно гипотеза H0 отвергается
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# 4. Найдем ошибку второго рода
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# критерия
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β := 1 - cnorm((C1 - a1)*sqrt(n)/σ1) = 0.181239
# 5. Найдем значения a11, при которых ошибка второго рода критерия S1 не превосходит ε = 0.1
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a11 := C1 - qnorm(1 - ε, 0, 1)*σ1/sqrt(n) = -2.57257
# 6. Построим совмещенные графики
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