# Задача 6
# Исходные данные: | Из решения задачи 5
# Номер варианта: 8
# Н2: a < a0
xm := -2.453
# Уровень доверия:
α := 0.05
# H3: σ > σ0
s2 := 3.526
a0 := -2
a1 := -2.5  # H1: a = a1
β := 0.181
σ0 := 1.7
σ1 := 1.75  # Н0: a = a0
C1 := -2.322
ε := 0.1  # Н01: σ = σ0
# Объем выборки:
n := 80
x := [
    -7.934, -4.058, -2.114, -3.192, -0.833, -4.188, -1.501, -3.423, -4.898, -4.386;
    1.593, -4.623, -6.764, -2.357, -2.036, -4.244, -2.723, -5.344, -1.09, -2.41;
    -0.421, 0.569, -2.322, -2.671, -0.537, -1.112, 2.407, -1.99, -3.624, -0.709;
    -3.069, -1.672, -6.772, -3.571, -2.1, -0.728, -2.568, -1.321, -2.69, -1.317;
    -2.048, -1.37, -2.172, -4.354, -2.84, -2.423, -1.277, -4.225, -2.537, -1.557;
    -4.385, -4.432, -1.593, -2.833, 0.8, -4.341, -0.841, -4.071, -0.872, -4.323;
    -1.386, -3.551, -1.647, -1.441, -4.588, -0.749, -2.423, -2.835, 0.449, -2.276;
    -2.628, -0.658, -2.699, 1.314, -1.347, -4.041, -0.714, -2.496, -5.954, -2.171
]
# 1. Построим последовательный критерий Вальда для проверки гипотезы Н0: a = a0 = -2 против альтернативы H1: a = a1 = -2.5 при известном σ = σ1 = 1.75
A := (1 - β)/α = 16.38
B := β/(1 - α) = 0.190526  # Постоянные А и В
# 2. Применим построенный критерий к данной выборке
# x записанное в столбец:
j := 0 .. n - 1
z[j] := x[j - 8*floor(j/8), floor(j/8)]
transpose(z) → [
    -7.934, 1.593, -0.421, -3.069, -2.048, -4.385, -1.386, -2.628, -4.058, -4.623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]
# Отношение правдоподобия:
Lf(j) := product(e^(z[i]*(a1 - a0)/σ1^2 + (a0^2 - a1^2)/(2*σ1^2)), i = 0 .. j)
# Графическая иллюстрация последовательного критерия:
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# Заметим, что график пересекает прямую A, следовательно, принимается гипотеза H1
# 3. Вычислим математическое ожидание момента принятия решения при основной гипотезе H0: a = a0 и при альтернативе H1: a = a1.
# Математическое ожидание момента принятия решения при основной гипотезе H0:
M0 := -(a1 - a0)^2/(2*σ1^2) = -0.0408163
M_a0_ν := (α*ln(A) + (1 - α)*ln(B))/M0 = 35.164
# Математическое ожидание момента принятия решения при основной гипотезе H1:
M1 := (a1 - a0)^2/(2*σ1^2) = 0.0408163
M_a1_ν := (β*ln(B) + (1 - β)*ln(A))/M1 = 48.7521
# 4. Найдем критическое множество
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a0 = -2
a1 = -2.5
σ1 = 1.75
n = 80
C1 = -2.322
a1 - a0 = -0.5
a0^2 - a1^2 = -2.25
σ1^2 = 3.0625
C1
(lnC*σ1^2/n + 2.25/2)/(-0.5) = C1  # error: This variable is undefined.
lnC*σ1^2/n = -C1*0.5 - 1.125  # error: This variable is undefined.
lnC := (-C1*0.5 - 1.125)*n/σ1^2 = 0.940408
C := e^lnC = 2.56103
n = 80
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# При этом при
Lf(n - 1) = 14.2625  # что принадлежит критическому множеству и следовательна принимается гипотеза H1
# 5. Изобразим С на графике
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